//This is the definition of the strength of the grip force of the hand
//The current strength is a guesstimate
MusPar={
  AnyMuscleModel HandGloveMomentStrength={
    F0=30; //Guesstimate!
  };
};

Mus={
  AnyGeneralMuscle RotMuscleZPos={
    AnyKinMeasureOrg &ref=..Jnt.HandGloveRotZ;
    AnyMuscleModel &mdl=..MusPar.HandGloveMomentStrength;
    ForceDirection=-1;
  };

  AnyGeneralMuscle RotMuscleZNeg={
    AnyKinMeasureOrg &ref=..Jnt.HandGloveRotZ;
    AnyMuscleModel &mdl=..MusPar.HandGloveMomentStrength;
    ForceDirection=1;
  };

  AnyGeneralMuscle RotMuscleYPos={
    AnyKinMeasureOrg &ref=..Jnt.HandGloveRotY;
    AnyMuscleModel &mdl=..MusPar.HandGloveMomentStrength;
    ForceDirection=-1;
  };

  AnyGeneralMuscle RotMuscleYNeg={
    AnyKinMeasureOrg &ref=..Jnt.HandGloveRotY;
    AnyMuscleModel &mdl=..MusPar.HandGloveMomentStrength;
    ForceDirection=1;
  };
  AnyGeneralMuscle RotMuscleXPos={
    AnyKinMeasureOrg &ref=..Jnt.HandGloveRotX;
    AnyMuscleModel &mdl=..MusPar.HandGloveMomentStrength;
    ForceDirection=-1;
  };

  AnyGeneralMuscle RotMuscleXNeg={
    AnyKinMeasureOrg &ref=..Jnt.HandGloveRotX;
    AnyMuscleModel &mdl=..MusPar.HandGloveMomentStrength;
    ForceDirection=1;
  };
};
