// ----------------------------------------------------------------------------------------------------------------
// BodyPartSetup - generic handling
// ----------------------------------------------------------------------------------------------------------------


// Setup default BM_LEG_MORPHOLOGY and BM_LEG_DATASET for the TLEM models
#ifndef BM_LEG_DATASET
  #if BM_LEG_MODEL == _LEG_MODEL_TLEM2_
  #define BM_LEG_DATASET "TLEM2.1"
  #endif
#endif

#ifndef BM_LEG_DATASET
  #if BM_LEG_MODEL == _LEG_MODEL_TLEM1_
  #define BM_LEG_DATASET "TLEM1.2"
  #endif
#endif

#ifdef BM_LEG_DATASET
  #ifndef BM_LEG_DATASET_PATH
    #path BM_LEG_DATASET_PATH "../../LegTLEM/" + BM_LEG_DATASET
    #include "<BM_LEG_DATASET_PATH>/PreprocDefaults.any"
  #endif
#endif

#ifndef BM_LEG_MORPHOLOGY
  #define BM_LEG_MORPHOLOGY 2
#endif


#if (BM_SCALING == _SCALING_UNIFORM_EXTMEASUREMENTS_) | (BM_SCALING == _SCALING_LENGTHMASS_EXTMEASUREMENTS_) | (BM_SCALING == _SCALING_LENGTHMASSFAT_EXTMEASUREMENTS_)
  #undef BM_SCALING_STANDARDPARAM_EXTERIOR
  #define BM_SCALING_STANDARDPARAM_EXTERIOR ON
#endif
