AnyDoc _AMMR_BETA_INFO_ =
{
   Hidden = On;
   #ifpathexists "../../../../.git"

   AnyFunEx ReadGitInfo = {
     AnyString Return = {"",""};
     AnyFunExMonoPy git_info = { ModuleFile = "git_info.py"; ArgList = { AnyString gitfolder = "";};};
   };
   AnyString GitInfo = ReadGitInfo("../../../../.git");
   #endif
};
