//define = [
//    {'BM_LEG_RIGHT': 'CONST_LEG_MODEL_Leg', 'BM_LEG_LEFT': 'CONST_LEG_MODEL_Leg',
//     'BM_ARM_LEFT':'OFF','BM_ARM_RIGHT':'OFF'},
//    {'BM_LEG_RIGHT': 'CONST_LEG_MODEL_TLEM', 'BM_LEG_LEFT': 'CONST_LEG_MODEL_TLEM',
//     'BM_ARM_LEFT':'OFF','BM_ARM_RIGHT':'OFF'},
//    {'BM_LEG_RIGHT': 'CONST_LEG_MODEL_TLEM', 'BM_LEG_LEFT': 'CONST_LEG_MODEL_TLEM', 'TLEM_VERSION':'"2.0"',
//     'BM_ARM_LEFT':'OFF','BM_ARM_RIGHT':'OFF'},
//    {'BM_LEG_RIGHT': 'CONST_LEG_MODEL_OFF', 'BM_LEG_LEFT': 'CONST_LEG_MODEL_OFF',
//     'BM_ARM_LEFT':'ON','BM_ARM_RIGHT':'ON'}
//]


#include "../AnyTest_Templates.any"

#include "../../Application/Validation/EvaluateJointStrength/EvaluateJointStrength.main.any"

Main =
{
  AnyOperation& RunTest = Main.RunApplication;
};
