//define = [
//    {'BM_LEG_RIGHT': '_LEG_MODEL_Leg_', 'BM_LEG_LEFT': '_LEG_MODEL_Leg_',
//     'BM_ARM_LEFT':'OFF','BM_ARM_RIGHT':'OFF'},
//    {'BM_LEG_RIGHT': '_LEG_MODEL_TLEM_', 'BM_LEG_LEFT': '_LEG_MODEL_TLEM_',
//     'BM_ARM_LEFT':'OFF','BM_ARM_RIGHT':'OFF'},
//    {'BM_LEG_RIGHT': '_LEG_MODEL_TLEM_', 'BM_LEG_LEFT': '_LEG_MODEL_TLEM_', 'TLEM_VERSION':'"2.0"',
//     'BM_ARM_LEFT':'OFF','BM_ARM_RIGHT':'OFF'},
//    {'BM_LEG_RIGHT': '_LEG_MODEL_OFF_', 'BM_LEG_LEFT': '_LEG_MODEL_OFF_',
//     'BM_ARM_LEFT':'ON','BM_ARM_RIGHT':'ON'}
//]

#include "../AnyTest_Templates.any"

#ifndef TEST_NAME
  #define BM_LEG_RIGHT "TLEM"
  #define BM_LEG_LEFT "TLEM"
  #define BM_ARM_LEFT 0
  #define BM_ARM_RIGHT 0
#endif

#include "../../Application/Validation/EvaluateMomentArms/EvaluateMomentArms.main.any"

Main =
{
  AnyOperation& RunTest = Main.RunApplication;
};
