#include "libdef.any"

Main =
{

   DEFAULT_PARAMETER_FOLDER Settings(
       NPARAM = 3,
       PARAM_1 = TrialNumber,
       PARAM_2 = Rotation, PARAM_2_TYPE = AnyMat33,
       PARAM_3 = Name, PARAM_3_TYPE = AnyString
   ) = {
       Default.TrialNumber = 2;
       Default.Rotation = RotMat(pi/2,y);
       Default.Name = "Subject2";
   };


   // Parameters can now be overridden
   Settings.Rotation = RotMat(pi,y);
   Settings.Name = "Subject2_test";


};
