AnyFolder JointsAndDrivers = {

  AnyKinDriver JntDriverTrunk = {

    #include "InterpolateJointAngleData.any"
    FileReader.FileName = TEMP_PATH + "/" + MOCAP_TEST_FILENAME_PREFIX + MOCAP_OUTPUT_FILENAME_PREFIX + Main.ModelSetup.TrialSpecificData.TrialFileName + "-euler-trunk.txt";

    /// The default data if no joint angles files have been generated.
    FileReader.Data0 = repmat(1,FileReader.Length0,
       {Main.HumanModel.Mannequin.Posture.PelvisPosX,
        Main.HumanModel.Mannequin.Posture.PelvisPosY,
        Main.HumanModel.Mannequin.Posture.PelvisPosZ,
        Main.HumanModel.Mannequin.Posture.PelvisRotX*pi/180,
        Main.HumanModel.Mannequin.Posture.PelvisRotY*pi/180,
        Main.HumanModel.Mannequin.Posture.PelvisRotZ*pi/180,
        0,0,0,0,0,0
    });
    AnyKinMeasure &PelvisPosX = ...BodyModel.Interface.Trunk.PelvisPosX;
    AnyKinMeasure &PelvisPosY = ...BodyModel.Interface.Trunk.PelvisPosY;
    AnyKinMeasure &PelvisPosZ = ...BodyModel.Interface.Trunk.PelvisPosZ;
    AnyKinMeasure &PelvisRotX = ...BodyModel.Interface.Trunk.PelvisRotX;
    AnyKinMeasure &PelvisRotY = ...BodyModel.Interface.Trunk.PelvisRotY;
    AnyKinMeasure &PelvisRotZ = ...BodyModel.Interface.Trunk.PelvisRotZ;
    AnyKinMeasure &PelvisThoraxExtension = ...BodyModel.Interface.Trunk.PelvisThoraxExtension;
    AnyKinMeasure &PelvisThoraxLateralBending = ...BodyModel.Interface.Trunk.PelvisThoraxLateralBending;
    AnyKinMeasure &PelvisThoraxRotation = ...BodyModel.Interface.Trunk.PelvisThoraxRotation;
    AnyKinMeasure& SkullThoraxFlexion = ...BodyModel.Interface.Trunk.SkullThoraxFlexion;
    AnyKinMeasure& SkullThoraxLateralBending = ...BodyModel.Interface.Trunk.SkullThoraxLateralBending;
    AnyKinMeasure& SkullThoraxRotation = ...BodyModel.Interface.Trunk.SkullThoraxRotation;
    Reaction.Type = repmat(nDim, Off);
  };

  #if BM_LEG_LEFT & (BM_LEG_MODEL == _LEG_MODEL_TLEM_ | BM_LEG_MODEL == _LEG_MODEL_TLEM2_)
  AnyKinDriver JntDriverLeftLegTD = {

    #include "InterpolateJointAngleData.any"
    FileReader.FileName = TEMP_PATH + "/" + MOCAP_TEST_FILENAME_PREFIX +MOCAP_OUTPUT_FILENAME_PREFIX + Main.ModelSetup.TrialSpecificData.TrialFileName + "-euler-leftlegtd.txt";
    FileReader.Data0 = zeros(nDim, FileReader.Length0 );

    AnyKinMeasure &HipFlexion = ...BodyModel.Interface.Left.HipFlexion;
    AnyKinMeasure &HipAbduction = ...BodyModel.Interface.Left.HipAbduction;
    AnyKinMeasure &HipExternalRotation = ...BodyModel.Interface.Left.HipExternalRotation;
    AnyKinMeasure &KneeFlexion = ...BodyModel.Interface.Left.KneeFlexion;
    AnyKinMeasure &AnklePlantarFlexion = ...BodyModel.Interface.Left.AnklePlantarFlexion;
    AnyKinMeasure &SubTalarEversion = ...BodyModel.Interface.Left.SubTalarEversion;
    Reaction.Type = repmat(nDim, Off);
  };
  #endif


  #if BM_LEG_RIGHT & (BM_LEG_MODEL == _LEG_MODEL_TLEM_ | BM_LEG_MODEL == _LEG_MODEL_TLEM2_)
  AnyKinDriver JntDriverRightLegTD = {
    #include "InterpolateJointAngleData.any"
    FileReader.FileName = TEMP_PATH + "/" + MOCAP_TEST_FILENAME_PREFIX +  MOCAP_OUTPUT_FILENAME_PREFIX + Main.ModelSetup.TrialSpecificData.TrialFileName + "-euler-rightlegtd.txt";
    FileReader.Data0 = zeros(nDim, FileReader.Length0 );

    AnyKinMeasure &HipFlexion = ...BodyModel.Interface.Right.HipFlexion;
    AnyKinMeasure &HipAbduction = ...BodyModel.Interface.Right.HipAbduction;
    AnyKinMeasure &HipExternalRotation = ...BodyModel.Interface.Right.HipExternalRotation;
    AnyKinMeasure &KneeFlexion = ...BodyModel.Interface.Right.KneeFlexion;
    AnyKinMeasure &AnklePlantarFlexion = ...BodyModel.Interface.Right.AnklePlantarFlexion;
    AnyKinMeasure &SubTalarEversion = ...BodyModel.Interface.Right.SubTalarEversion;
    Reaction.Type = repmat(nDim, Off);
  };
  #endif


  #if BM_LEG_LEFT & BM_LEG_MODEL == _LEG_MODEL_LEG_
  AnyKinDriver JntDriverLeftLeg = {
    #include "InterpolateJointAngleData.any"
    FileReader.FileName = TEMP_PATH + "/" + MOCAP_TEST_FILENAME_PREFIX + MOCAP_OUTPUT_FILENAME_PREFIX + Main.ModelSetup.TrialSpecificData.TrialFileName + "-euler-leftleg.txt";
    FileReader.Data0 = zeros(nDim, FileReader.Length0 );

    AnyKinMeasure &HipFlexion = ...BodyModel.Interface.Left.HipFlexion;
    AnyKinMeasure &HipAbduction = ...BodyModel.Interface.Left.HipAbduction;
    AnyKinMeasure &HipExternalRotation = ...BodyModel.Interface.Left.HipExternalRotation;
    AnyKinMeasure &KneeFlexion = ...BodyModel.Interface.Left.KneeFlexion;
    AnyKinMeasure &AnklePlantarFlexion = ...BodyModel.Interface.Left.AnklePlantarFlexion;
    AnyKinMeasure &AnkleEversion = ...BodyModel.Interface.Left.AnkleEversion;
    Reaction.Type = repmat(nDim, Off);
  };
  #endif


  #if BM_LEG_RIGHT & BM_LEG_MODEL == _LEG_MODEL_LEG_
  AnyKinDriver JntDriverRightLeg = {
    #include "InterpolateJointAngleData.any"
    FileReader.FileName = TEMP_PATH + "/" + MOCAP_TEST_FILENAME_PREFIX + MOCAP_OUTPUT_FILENAME_PREFIX + Main.ModelSetup.TrialSpecificData.TrialFileName + "-euler-rightleg.txt";
    FileReader.Data0 = zeros(nDim, FileReader.Length0 );

    AnyKinMeasure &HipFlexion = ...BodyModel.Interface.Right.HipFlexion;
    AnyKinMeasure &HipAbduction = ...BodyModel.Interface.Right.HipAbduction;
    AnyKinMeasure &HipExternalRotation = ...BodyModel.Interface.Right.HipExternalRotation;
    AnyKinMeasure &KneeFlexion = ...BodyModel.Interface.Right.KneeFlexion;
    AnyKinMeasure &AnklePlantarFlexion = ...BodyModel.Interface.Right.AnklePlantarFlexion;
    AnyKinMeasure &AnkleEversion = ...BodyModel.Interface.Right.AnkleEversion;
    Reaction.Type = repmat(nDim, Off);
  };
  #endif


  #if BM_ARM_LEFT == ON & BM_ARM_SHOULDER_RHYTHM == OFF
    AnyKinDriver JntDriverLeftShoulder = {
    #include "InterpolateJointAngleData.any"
    FileReader.FileName = TEMP_PATH + "/" + MOCAP_TEST_FILENAME_PREFIX + MOCAP_OUTPUT_FILENAME_PREFIX + Main.ModelSetup.TrialSpecificData.TrialFileName + "-euler-left_shoulder.txt";
    FileReader.Data0 = zeros(nDim, FileReader.Length0 );
    AnyKinMeasure &SternoClavicularProtraction=...BodyModel.Interface.Left.SternoClavicularProtraction;
    AnyKinMeasure &ScapulaThoraxElevation=...BodyModel.Interface.Left.ScapulaThoraxElevation;
    AnyKinMeasure &SternoClavicularAxialRotation=...BodyModel.Interface.Left.SternoClavicularAxialRotation;
    Reaction.Type = repmat(nDim, Off);
  };
  #endif

  #if BM_ARM_LEFT == ON
  AnyKinDriver JntDriverLeftArm = {
    #include "InterpolateJointAngleData.any"
    FileReader.FileName = TEMP_PATH + "/" + MOCAP_TEST_FILENAME_PREFIX + MOCAP_OUTPUT_FILENAME_PREFIX + Main.ModelSetup.TrialSpecificData.TrialFileName + "-euler-left_arm.txt";
    FileReader.Data0 = zeros(nDim, FileReader.Length0 );

    AnyKinMeasure &GlenohumeralFlexion = ...BodyModel.Interface.Left.GlenohumeralFlexion;
    AnyKinMeasure &GlenohumeralExternalRotation = ...BodyModel.Interface.Left.GlenohumeralExternalRotation;
    AnyKinMeasure &GlenohumeralAbduction = ...BodyModel.Interface.Left.GlenohumeralAbduction;
    AnyKinMeasure &ElbowFlexion = ...BodyModel.Interface.Left.ElbowFlexion;
    AnyKinMeasure &ElbowPronation = ...BodyModel.Interface.Left.ElbowPronation;
    AnyKinMeasure &WristFlexion = ...BodyModel.Interface.Left.WristFlexion;
    AnyKinMeasure &WristAbduction = ...BodyModel.Interface.Left.WristAbduction;
    Reaction.Type = repmat(nDim, Off);
  };
  #endif


  #if BM_ARM_RIGHT == ON & BM_ARM_SHOULDER_RHYTHM == OFF
  AnyKinDriver JntDriverRightShoulder = {
    #include "InterpolateJointAngleData.any"
    FileReader.FileName = TEMP_PATH + "/" + MOCAP_TEST_FILENAME_PREFIX + MOCAP_OUTPUT_FILENAME_PREFIX + Main.ModelSetup.TrialSpecificData.TrialFileName + "-euler-right_shoulder.txt";
    FileReader.Data0 = zeros(nDim, FileReader.Length0 );
    AnyKinMeasure &SternoClavicularProtraction =...BodyModel.Interface.Right.SternoClavicularProtraction;
    AnyKinMeasure &ScapulaThoraxElevation=...BodyModel.Interface.Right.ScapulaThoraxElevation;
    AnyKinMeasure &SternoClavicularAxialRotation=...BodyModel.Interface.Right.SternoClavicularAxialRotation;
    Reaction.Type = repmat(nDim, Off);
  };
  #endif

  #if BM_ARM_RIGHT == ON
  AnyKinDriver JntDriverRightArm = {
    #include "InterpolateJointAngleData.any"
    FileReader.FileName = TEMP_PATH + "/" + MOCAP_TEST_FILENAME_PREFIX + MOCAP_OUTPUT_FILENAME_PREFIX + Main.ModelSetup.TrialSpecificData.TrialFileName + "-euler-right_arm.txt";
    FileReader.Data0 = zeros(nDim, FileReader.Length0 );

    AnyKinMeasure &GlenohumeralFlexion = ...BodyModel.Interface.Right.GlenohumeralFlexion;
    AnyKinMeasure &GlenohumeralExternalRotation = ...BodyModel.Interface.Right.GlenohumeralExternalRotation;
    AnyKinMeasure &GlenohumeralAbduction = ...BodyModel.Interface.Right.GlenohumeralAbduction;
    AnyKinMeasure &ElbowFlexion = ...BodyModel.Interface.Right.ElbowFlexion;
    AnyKinMeasure &ElbowPronation = ...BodyModel.Interface.Right.ElbowPronation;
    AnyKinMeasure &WristFlexion = ...BodyModel.Interface.Right.WristFlexion;
    AnyKinMeasure &WristAbduction = ...BodyModel.Interface.Right.WristAbduction;
    Reaction.Type = repmat(nDim, Off);
  };
  #endif

};
